// COMSOL Multiphysics 4.3a (Build: 161) model "basic_step_2.mph"
// Outline of the model tree

Geometry
  geom1 "Geometry 1" (2D, length unit mm)
    r1: Rectangle "Probe" | size = {100, 10}
    r2: Rectangle "Keyhole" | pos = {15, 6}; size = {1, 4}
    fin: Finalize "Form Union"

Materials
  mat1 "X10NiCrMoTiB1515 (DIN 1.4970) [solid]" on all domains
    def "Basic"
      dL = dL(T[1/K])-dL(Tempref[1/K])
      thermalconductivity = k(T[1/K])[W/(m*K)]
      thermalexpansioncoefficient = alpha(T[1/K])[1/K]+(Tempref-293[K])/(T-Tempref)*(alpha(T[1/K])[1/K]-alpha(Tempref[1/K])[1/K])
      heatcapacity = C(T[1/K])[J/(kg*K)]
      density = rho(T[1/K])[kg/m^3]
      TD = TD(T[1/K])[m^2/s]
      dL: Piecewise | arg = T; extrap = constant; pieces = {293.0, 1273.0, -0.004001145+1.123311E-5*T^1+9.137522E-9*T^2-2.96589E-12*T^3}
      k: Piecewise | arg = T; extrap = constant; pieces = {293.0, 1273.0, 9.200508+0.0132224*T^1+6.943989E-6*T^2-7.160077E-9*T^3+1.702977E-12*T^4}
      alpha: Piecewise | arg = T; extrap = constant; pieces = {293.0, 1273.0, 1.378384E-5+8.008135E-9*T^1-2.829525E-12*T^2}
      C: Piecewise | arg = T; extrap = constant; pieces = {293.0, 1273.0, 330.7133+0.8038326*T^1-0.001260275*T^2+1.03842E-6*T^3-3.146145E-10*T^4}
      rho: Piecewise | arg = T; extrap = constant; pieces = {293.0, 1273.0, 8067.331-0.2796353*T^1-2.019394E-4*T^2+7.199288E-8*T^3}
      TD: Piecewise | arg = T; extrap = constant; pieces = {293.0, 1273.0, 3.354831E-6-1.551308E-9*T^1+9.499459E-12*T^2-8.71403E-15*T^3+2.630357E-18*T^4}

Physics
  ht: HeatTransfer "Heat Transfer in Solids" on all domains
    dependent variable T
    solid1: SolidHeatTransferModel "Heat Transfer in Solids 1" (default)
    ins1: ThermalInsulation (default)
    init1: init "Initial Values 1" (default)
    init2: init "KH_Temp" on domains 2 | T = 3000
    temp1: TemperatureBoundary "KH_Rand" on boundaries 4, 5, 7 | T0 = 3000

Mesh
  mesh1 "Mesh 1"
    size: MeshSizeDefault | hmax = 3; hgrad = 1.2; hauto = 5; custom = on
    ftri1: FreeTri "Free Triangular 1" on entire geometry

Studies
  std1 "Study 1"
    time: Transient "Time Dependent" | tlist = 0.1

Solver configurations
  sol1 "Solver 1" (study std1)
    v1: Variables "Dependent Variables 1"
    t1: Time "Time-Dependent Solver 1" | tlist = 0.1; atolglobalmethod = scaled; atolglobal = 0.0010; maxorder = 2
      fc1: FullyCoupled | linsolver = d1; maxiter = 5; jtech = once
      d1: Direct | linsolver = pardiso
  sol2 "Solver 2" (study std1)
    v1: Variables "Dependent Variables 1" | initmethod = sol
    t1: Time "Time-Dependent Solver 1" | tlist = 0.1; atolglobalmethod = scaled; atolglobal = 0.0010; maxorder = 2
      fc1: FullyCoupled | linsolver = d1; maxiter = 5; jtech = once
      d1: Direct | linsolver = pardiso

Datasets
  dset1: Solution | solution = sol1
  dset2: Solution | solution = sol2

Plots
  pg1: PlotGroup2D "Temperature" | data = dset1
    surf1: Surface | expr = T
  pg2: PlotGroup2D "Isothermal contours" | data = dset1
    con1: Contour | expr = T
    arws1: ArrowSurface | expr = {ht.tfluxx, ht.tfluxy}
  pg3: PlotGroup2D "Temperature 1" | data = dset2
    surf1: Surface | expr = T
  pg4: PlotGroup2D "Isothermal contours 1" | data = dset2
    con1: Contour | expr = T
    arws1: ArrowSurface | expr = {ht.tfluxx, ht.tfluxy}